// COMSOL Multiphysics 6.1.0.282 model "HH-cable.mph"
// Outline of the model tree

Parameters
  delta_t = 0.01[ms]
  t_end = 10[ms]
  t_ini_s = 0.5[ms]
  delta_s = 1[ms]
  L_stim = 40[um]
  conn_width = 162.5[nm]
  conn_length = 277[um]
  L_AIS = L_stim + 50[um]
  Na_inter = 190[nm]

Functions
  rect1: Rectangle | funcname = f_t; lower = t_ini_s; upper = t_ini_s + delta_s; smooth = 0.00001
  rect2: Rectangle | funcname = f_x; lower = -L_AIS; upper = -L_AIS+L_stim; smooth = 0.0000001
  an1: Analytic | funcname = f_Na; expr = 0.5*sign(sin(2*pi*x/Na_inter)-0.875)+0.5; argunit = m

Variables
  var1 "Variables 1"
    r_m = 4*(35.4[ohm*cm])/sqrt(z^2+y^2)  // 35.4[mS]/200000
    c_m = 1[uF/cm^2]
    g_K = 36[mS/cm^2]
    E_K = -12[mV]
    I_K = g_K*n^4*(V_m-E_K)
    alpha_n = (10[mV]-V_m)/(100[mV*ms]*(exp((10[mV]-V_m)/10[mV])-1))
    beta_n = 0.125[1/ms]*exp(-V_m/80[mV])
    n_0 = 0.32
    I_Na = f_Na(x)*g_Na*m^3*h*(V_m-E_Na)  // f_Na(x)*g_Na*m^3*h*(V_m-E_Na)
    g_Na = (1+.8294/.1706)*120[mS/cm^2]  // (1+.8294/.1706)*120[mS/cm^2]
    E_Na = 115[mV]
    alpha_m = (25[mV]-V_m)/(10[ms*mV]*(exp((25[mV]-V_m)/10[mV])-1))
    beta_m = 4[1/ms]*exp(-V_m/18[mV])
    alpha_h = 0.07[1/ms]*exp(-V_m/20[mV])
    beta_h = 1[1/ms]/(exp((30[mV]-V_m)/10[mV])+1)
    g_m = 0.3[mS/cm^2]
    V_rest = 10.613[mV]
    m_0 = 0.05
    h_0 = 0.6
    i_m = I_K + I_Na + I_L-I_ext
    I_L = g_m*(V_m-V_rest)
    V_0 = 0
    I_ext = 30[uA/cm^2]*f_t(t)*f_x(x)

Selections
  sel1: Explicit "Membrane" on boundaries 1-6

Geometry
  geom1 "Geometry 1" (3D, length unit µm)
    cyl1: Cylinder | pos = {-L_AIS, 0, 0}; axistype = x; r = conn_width/2; h = L_AIS + conn_length
    pt1: Point | p = {, , conn_width/2}
    fin: Finalize "Form Union"

Physics
  cb: CoefficientFormBoundaryPDE on selection sel1
    dependent variable V_m
    EquationForm.form = Automatic
    Units.DependentVariableQuantity = electricpotential
    Units.SourceTermQuantity = currentdensity
    cfeq1: CoefficientFormPDE (default) | c = 1/r_m; f = -i_m; da = c_m
    init1: init "Initial Values 1" (default) | V_m = V_0
  cb2: CoefficientFormBoundaryPDE on selection sel1
    dependent variable u = {n, m, h}
    EquationForm.form = Automatic
    Units.SourceTermQuantity = specificdissipationrate
    cfeq1: CoefficientFormPDE (default)
      c = 
        {0, 0, 0, 0, 0, 0, 0, 0, 0}
        {0, 0, 0, 0, 0, 0, 0, 0, 0}
        {0, 0, 0, 0, 0, 0, 0, 0, 0}
        {0, 0, 0, 0, 0, 0, 0, 0, 0}
        {0, 0, 0, 0, 0, 0, 0, 0, 0}
        {0, 0, 0, 0, 0, 0, 0, 0, 0}
        {0, 0, 0, 0, 0, 0, 0, 0, 0}
        {0, 0, 0, 0, 0, 0, 0, 0, 0}
        {0, 0, 0, 0, 0, 0, 0, 0, 0}
      f = {alpha_n*(1-n)-beta_n*n, alpha_m*(1-m)-beta_m*m, alpha_h*(1-h)-beta_h*h}
      da = 1
    init1: init "Initial Values 1" (default) | n = n_0; m = m_0; h = h_0

Mesh
  mesh1 "Mesh 1" (physics-controlled)
    size: MeshSizeDefault | hauto = 1

Studies
  std1 "Study 1"
    time: Transient "Time Dependent" | tunit = ms; tlist = range(0,delta_t,t_end)

Solver configurations
  sol1 "Solution 1" (study std1)
    v1: Variables "Dependent Variables 1"
    t1: Time "Time-Dependent Solver 1" | tlist = range(0,delta_t,t_end); maxstepconstraintbdf = const; maxstepbdf = 0.055
      dDef: Direct
      fc1: FullyCoupled | linsolver = dDef

Datasets
  dset1: Solution | solution = sol1

Plots
  pg1: PlotGroup3D "Coefficient Form Boundary PDE" | data = dset1
    surf1: Surface | expr = V_m; unit = mV
  pg2: PlotGroup3D "Coefficient Form Boundary PDE 2" | data = dset1
    surf1: Surface | expr = h
  pg3: PlotGroup1D "1D Plot Group 3" | data = dset1
    ptgr1: PointGraph on points 3, 5, 8 | expr = V_m; unit = mV; autopoint = off; autosolution = off

Exports
  plot1: Plot | filename = /Users/maytebonillaquintana/Downloads/HH-radius-simple-mean-Na30.txt